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/batch
! ANSYS input file written by Workbench version 12.0.1 Release
! File used for geometry attach: C:\Users\DELL\AppData\Local\Temp\WB_DELL-PC_5844_2\unsaved_project_files\dp0\SYS\DM\SYS.agdb
/com,--- Data in consistent MKS units.
/units,MKS
/track,-1
/prep7
! Turn off shape checking because checks already performed inside WB mesher.
! See help system for more information.
SHPP,OFF,,NOWARN
etcon,set             ! allow ANSYS to choose best KEYOP's for 180x elements
/com,*********** Nodes for the whole assembly ***********
nblock,3
(1i8,3e20.9e3)
       1   -9.144000000E-001    3.678850270E-018   -1.270000000E-002
       2   -9.144000000E-001    6.350000000E-003   -1.099852263E-002
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-1
/com,*********** Elements for Body 1 "Solid" ***********
et,1,187
eblock,10
(15i8)
       1       1       1       1       0    4452    4464    4503    4529   27093   27197   27096   27098   27204   27414
       2       1       1       1       0    4452    4511    4947    4529   27097   27449   27099   27098   27448   27523
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-1
/com,*********** Send User Defined Coordinate System(s) ***********
csys,0
/com,*********** Set Reference Temperature ***********
tref,22.
/com,*********** Send Materials ***********
MP,DENS,1,7850.,	! kg m^-3
MP,ALPX,1,1.2e-005,	! C^-1
MP,C,1,434.,	! J kg^-1 C^-1
MP,KXX,1,60.5,	! W m^-1 C^-1
MP,MURX,1,10000.,
MP,RSVX,1,1.7e-007,	! kg m^3 A^-2 s^-3
MP,EX,1,200000000000.,	! Pa
MP,NUXY,1,0.3,

!************************* Model Summary ********************
!Solid, Structural Steel, matid, 1
!************************* End Model Summary ********************
/com,*********** Fixed Supports ***********
CMBLOCK,FIXEDSU ,NODE,    1084
(8i10)
       613       614       615       616       617       618       619       620
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cmsel,s,FIXEDSU
d,all,all
nsel,all
nsel,all
/com,*********** Create Remote Point "Internal Remote Point" ***********
! -------- Remote Point Used by "Moment" --------
*set,tid,3
*set,cid,2
et,cid,174
et,tid,170
keyo,tid,2,1               ! Don't fix the pilot node
keyo,tid,4,111111
keyo,cid,12,5              ! Bonded Contact
keyo,cid,4,1               ! Deformable RBE3 style load
keyo,cid,2,2               ! MPC style contact
eblock,10
(15i8)
   13641       2       2       2       0    1387    1646    1754    1754   11953   14270    1754   11954
   13642       2       2       2       0    1778    1976    1853    1853   15106   15498    1853   15105
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-1
eblock,10
(15i8)
   15203       2       2       2       0    3507    3671    3684    3684   23249   23818    3684   23250
   15204       2       2       2       0    3356    3612    3904    3904   22386   23658    3904   22389
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-1
*set,_npilot,28345
_npilot27=_npilot
type,tid
mat ,cid
real,cid
tshape,pilo
en,16749,_npilot
tshape
/com,*********** Create Remote Point "Internal Remote Point 2" ***********
! -------- Remote Point Used by "Moment 2" --------
*set,tid,5
*set,cid,4
et,cid,174
et,tid,170
keyo,tid,2,1               ! Don't fix the pilot node
keyo,tid,4,111111
keyo,cid,12,5              ! Bonded Contact
keyo,cid,4,1               ! Deformable RBE3 style load
keyo,cid,2,2               ! MPC style contact
eblock,10
(15i8)
   16750       4       4       4       0    1188    1187    1227    1227   10871   10872    1227   10879
   16751       4       4       4       0    1182    1181    1207    1207   10837   10839    1207   10844
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-1
*set,_npilot,28346
_npilot30=_npilot
type,tid
mat ,cid
real,cid
tshape,pilo
en,16802,_npilot
tshape
/com,*********** Construct Moment Using RBE3/CERIG Style Contact ***********

*DIM,_loadvari26x,TABLE,2,1,1,TIME,
! Time values
_loadvari26x(1,0,1) = 0.
_loadvari26x(2,0,1) = 1.
! Load values
_loadvari26x(1,1,1) = 0.
_loadvari26x(2,1,1) = 99.


*DIM,_loadvari26y,TABLE,2,1,1,TIME,
! Time values
_loadvari26y(1,0,1) = 0.
_loadvari26y(2,0,1) = 1.
! Load values
_loadvari26y(1,1,1) = 0.
_loadvari26y(2,1,1) = 0.


*DIM,_loadvari26z,TABLE,2,1,1,TIME,
! Time values
_loadvari26z(1,0,1) = 0.
_loadvari26z(2,0,1) = 1.
! Load values
_loadvari26z(1,1,1) = 0.
_loadvari26z(2,1,1) = 0.

/com,*********** Construct Moment Using RBE3/CERIG Style Contact ***********

*DIM,_loadvari29x,TABLE,2,1,1,TIME,
! Time values
_loadvari29x(1,0,1) = 0.
_loadvari29x(2,0,1) = 1.
! Load values
_loadvari29x(1,1,1) = 0.
_loadvari29x(2,1,1) = -198.


*DIM,_loadvari29y,TABLE,2,1,1,TIME,
! Time values
_loadvari29y(1,0,1) = 0.
_loadvari29y(2,0,1) = 1.
! Load values
_loadvari29y(1,1,1) = 0.
_loadvari29y(2,1,1) = 0.


*DIM,_loadvari29z,TABLE,2,1,1,TIME,
! Time values
_loadvari29z(1,0,1) = 0.
_loadvari29z(2,0,1) = 1.
! Load values
_loadvari29z(1,1,1) = 0.
_loadvari29z(2,1,1) = 0.

fini
/com,****************************************************************************
/com,*************************    SOLUTION       ********************************
/com,****************************************************************************
/solu
antype,0                   ! static analysis
solc,on,on                 ! Turn on solution control with ability to use contact time prediction
!eqsl,sparse               ! using sparse solver which is default so no eqsl command needed
resc,,none                 ! Do not keep any restart files
cntr,print,1               ! print out contact info and also make no initial contact an error
nldiag,cont,iter           ! print out contact info each equilibrium iteration
/com,****************************************************
/com,******************* SOLVE FOR LS 1 ****************
nsel,s,node,,28345
f,all,mx,%_loadvari26x%
f,all,my,%_loadvari26y%
f,all,mz,%_loadvari26z%
nsel,s,node,,28346
f,all,mx,%_loadvari29x%
f,all,my,%_loadvari29y%
f,all,mz,%_loadvari29z%
nsel,all
nsub,1,1,1
time,1.
outres,erase
outres,all,none
outres,nsol,all
outres,rsol,all
outres,nload,all
outres,strs,all
outres,epel,all
outres,eppl,all
! *********** WB SOLVE COMMAND ***********
! check interactive state
*get,ANSINTER_,active,,int
*if,ANSINTER_,ne,0,then
/eof
*endif
solve
/com,****************************************************
/com,*************** FINISHED SOLVE FOR LS 1 *************
*set,_DS_PROGRESS          ! turn off progress updates to avoid virus scanning bug
/post1
fini
